**
**     _____ _ _         __  __           _ _  __ _          _
**    |  ___(_) | ___   |  \/  | ___   __| (_)/ _(_) ___  __| |
**    | |_  | | |/ _ \  | |\/| |/ _ \ / _` | | |_| |/ _ \/ _` |
**    |  _| | | |  __/  | |  | | (_) | (_| | |  _| |  __/ (_| |
**    |_|   |_|_|\___|  |_|  |_|\___/ \__,_|_|_| |_|\___|\__,_|
**
**    by SIMULIA Tosca Structure 3DEXPERIENCE R2021x Build R423 - 20200319T210011Z
**    Time: Wed May 19 09:31:47 2021
**
*Heading
** Job name: coarseMeshTet-Job Model name: Model-1
** Generated by: Abaqus/CAE 2021
*Preprint, echo=NO, model=NO, history=NO, contact=NO
** ----------------------------------------------------------------
**
** PART INSTANCE: Part-1-1
**
*Node
	      1,         100.,          50.,          50.
	      2,         100.,           0.,          50.
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*Element, type=C3D4
	   1, 253, 254, 255, 256
	   2, 253, 257, 258, 259
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*Elset, elset=_Part-1-1_ALL_ELEMENTS, generate
	    1,  1921,     1
*Nset, nset=Part-1-1_Set-1, generate
	   1,  464,    1
*Elset, elset=Part-1-1_Set-1, generate
	    1,  1921,     1
** Section: Section-1
**
** Properties modified via distribution tables
** Added by the optimization system
**
**
** NEW ELEMENT SET ADDED BY THE OPTIMIZATION SYSTEM
**
*ELSET, ELSET=EL_P1_M1621409507_1, GENERATE
	1, 1921, 1
**
** NEW PROPERTY BASED ON PROPERTY 1 ADDED BY THE OPTIMIZATION SYSTEM
**
*SOLID SECTION, ELSET=EL_P1_M1621409507_1, MATERIAL=MATERIAL-1
	1.0
*SCALESTIFFNESS
	__SMATSO_DISTRIBUTION_STIFFNESS_1
*SCALEMASS
	__SMATSO_DISTRIBUTION_MASS_1
**
** Distribution table added by the optimization system
**
*INCLUDE, INPUT=sample03_3D_C3D4_tosca_distribution.inp
*System
*Nset, nset=Set-1
	   5,   6,   7,   8,  34,  35
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*Elset, elset=Set-1
	  140,  183,  464,  670,  673,  713
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*Nset, nset=Set-5, generate
	   1,  464,    1
*Elset, elset=Set-5, generate
	    1,  1921,     1
*Elset, elset=_Surf-1_S3
	   63,   64,  141,  323,  360,  461
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*Elset, elset=_Surf-1_S2
	  997, 1882
*Elset, elset=_Surf-1_S4
	 1160, 1914
*Surface, type=ELEMENT, name=Surf-1
	_Surf-1_S3, S3
	_Surf-1_S2, S2
	_Surf-1_S4, S4
**
** MATERIALS
**
*MATERIAL, NAME=MATERIAL-1
*Elastic
	 2.1e+08, 0.3
**
** BOUNDARY CONDITIONS
**
** Name: BC-1 Type: Symmetry/Antisymmetry/Encastre
*Boundary
	Set-1, ENCASTRE
** ----------------------------------------------------------------
**
** STEP: Step-1
**
*STEP, NAME=Step-1, NLGEOM=NO, SENSITIVITY=ADJOINT
*Static
	1., 1., 1e-05, 1.
**
** LOADS
**
** Name: Load-1   Type: Pressure
*Dsload
	Surf-1, P, -0.2
**
** OUTPUT REQUESTS
**
*Restart, write, frequency=0
**
** FIELD OUTPUT: F-Output-1
**
*Output, field, variable=PRESELECT
**
** HISTORY OUTPUT: H-Output-1
**
*Output, history, variable=PRESELECT
**
** START OF RESULT REQUEST FOR OPTIMIZATION
**
*DESIGN RESPONSE, NAME=D-RESPONSE-1
*GLOBAL RESPONSE
	STIFF
**
** END OF RESULT REQUEST FOR OPTIMIZATION
**
*End Step
