**
**     _____ _ _         __  __           _ _  __ _          _
**    |  ___(_) | ___   |  \/  | ___   __| (_)/ _(_) ___  __| |
**    | |_  | | |/ _ \  | |\/| |/ _ \ / _` | | |_| |/ _ \/ _` |
**    |  _| | | |  __/  | |  | | (_) | (_| | |  _| |  __/ (_| |
**    |_|   |_|_|\___|  |_|  |_|\___/ \__,_|_|_| |_|\___|\__,_|
**
**    by SIMULIA Tosca Structure 3DEXPERIENCE R2021x Build R423 - 20200319T210011Z
**    Time: Tue Jun 15 14:14:39 2021
**
*Heading
** Job name: Cantilever_line-load-Job Model name: Model-1
** Generated by: Abaqus/CAE 2021
*Preprint, echo=NO, model=NO, history=NO, contact=NO
** ----------------------------------------------------------------
**
** PART INSTANCE: Part-1-1
**
*Node
	      1,         100.,          50.,          50.
	      2,         100.,           0.,          50.
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*Element, type=C3D4
	    1,  4003,  4004,  4005,  4006
	    2,  4007,  4008,  4009,  4003
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*Elset, elset=_Part-1-1_ALL_ELEMENTS, generate
	     1,  74047,      1
*Nset, nset=Part-1-1_Set-cuboid, generate
	     1,  14321,      1
*Elset, elset=Part-1-1_Set-cuboid, generate
	     1,  74047,      1
** Section: Section-1
**
** Properties modified via distribution tables
** Added by the optimization system
**
**
** NEW ELEMENT SET ADDED BY THE OPTIMIZATION SYSTEM
**
*ELSET, ELSET=EL_P1_M1623759279_1, GENERATE
	1, 74047, 1
**
** NEW PROPERTY BASED ON PROPERTY 1 ADDED BY THE OPTIMIZATION SYSTEM
**
*SOLID SECTION, ELSET=EL_P1_M1623759279_1, MATERIAL=MATERIAL-1
	1.0
*SCALESTIFFNESS
	__SMATSO_DISTRIBUTION_STIFFNESS_1
*SCALEMASS
	__SMATSO_DISTRIBUTION_MASS_1
**
** Distribution table added by the optimization system
**
*INCLUDE, INPUT=sample06_C3D4_cantilever_line_tosca_distribution.inp
*System
*Nset, nset=Set-bc-face
	    5,    6,    7,    8,  124,  125
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*Elset, elset=Set-bc-face
	   247,   259,   339,   486,   604,   606
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*Nset, nset=Set-line-load
	  2,  3, 28, 29, 30, 31
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*Elset, elset=Set-line-load
	  4733,  4965,  6319,  6335,  6445,  6452
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*Nset, nset=Set-line-load-node
	  2,  3, 28, 29, 30, 31
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**
** MATERIALS
**
*MATERIAL, NAME=MATERIAL-1
*Elastic
	 2.1e+08, 0.3
**
** BOUNDARY CONDITIONS
**
** Name: BC-1 Type: Symmetry/Antisymmetry/Encastre
*Boundary
	Set-bc-face, ENCASTRE
** ----------------------------------------------------------------
**
** STEP: Step-1
**
*STEP, NAME=Step-1, NLGEOM=NO, SENSITIVITY=ADJOINT
*Static
	1., 1., 1e-05, 1.
**
** LOADS
**
** Name: Load-1   Type: Concentrated force
*Cload
	Set-line-load-node, 2, -200.
**
** OUTPUT REQUESTS
**
*Restart, write, frequency=0
**
** FIELD OUTPUT: F-Output-1
**
*Output, field, variable=PRESELECT
**
** HISTORY OUTPUT: H-Output-1
**
*Output, history, variable=PRESELECT
**
** START OF RESULT REQUEST FOR OPTIMIZATION
**
*DESIGN RESPONSE, NAME=D-RESPONSE-1
*GLOBAL RESPONSE
	STIFF
**
** END OF RESULT REQUEST FOR OPTIMIZATION
**
*End Step
