*Heading
** Job name: sample07_cantilever_beam-Job Model name: Model-1
** Generated by: Abaqus/CAE 2021
*Preprint, echo=NO, model=NO, history=NO, contact=NO
** ----------------------------------------------------------------
**
** PART INSTANCE: Part-1-1
**
*Node
      1,         100.,          50.,          50.
      2,         100.,           0.,          50.
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*Element, type=C3D4
    1,  4003,  4004,  4005,  4006
    2,  4007,  4008,  4009,  4003
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*Elset, elset=_Part-1-1_ALL_ELEMENTS, generate
     1,  74047,      1
*Nset, nset=Part-1-1_Set-1, generate
     1,  14321,      1
*Elset, elset=Part-1-1_Set-1, generate
     1,  74047,      1
** Section: Section-1
*Solid Section, elset=Part-1-1_Set-1, material=Material-1
,
*System
*Nset, nset=Set-BC-surface
    5,    6,    7,    8,  124,  125
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*Elset, elset=Set-BC-surface
   247,   259,   339,   486,   604,   606
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*Nset, nset=Set-load-surface
  2,  3, 28, 29, 30, 31
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**
** MATERIALS
**
*Material, name=Material-1
*Elastic
 2.1e+08, 0.3
**
** BOUNDARY CONDITIONS
**
** Name: BC-1 Type: Symmetry/Antisymmetry/Encastre
*Boundary
Set-BC-surface, ENCASTRE
** ----------------------------------------------------------------
**
** STEP: Step-1
**
*Step, name=Step-1, nlgeom=NO
*Static
1., 1., 1e-05, 1.
**
** LOADS
**
** Name: Load-1   Type: Concentrated force
*Cload
Set-load-surface, 2, -200.
**
** OUTPUT REQUESTS
**
*Restart, write, frequency=0
**
** FIELD OUTPUT: F-Output-1
**
*Output, field, variable=PRESELECT
**
** HISTORY OUTPUT: H-Output-1
**
*Output, history, variable=PRESELECT
*End Step
